# Determinarea momentului necesar si selectarea servomotorului
# Luam in considerare urmatoarele aspecte:
# Deschiderea maxima dintre degetele gripperului este:
d_degete := 122 mm = 0.122 m
# Greutatea maxima a corpului manipulat este:
m_max := 0.2 kg
# Distanta maxima din centrul obiectului manipulat la punctul de contact intre gripper si obiect este:
d_contact := 61 mm = 0.061 m
# Degetele gripperului sunt paralele una fata de cealalta
# Materialul utilizat in realizarea componentelor gripper-ului este PLA
# PLA are coeficient de frecare μ = 0.35 - 0.42
# Calcularea fortei minime necesare manipularii
μ := 0.42
c_sig := 2
# F_min - forta minima necesara (N)
# m_max - greutatea maxima a obiectului (N)
# μ- coeficient de frecare pentru PLA
# c_sig- coeficient de siguranta
F_min := m_max*g/μ*c_sig = 9.33967 N
F_deget := F_min/2 = 4.66983 N  # F_deget - forta exercitata pe deget (N)
# Calcularea momentului minim necesar
# M_min- moment minim necesar (Nm)
# d_contact - distanta maxima din centrul obiectului
# manipulat la punctul de contact intre
# gripper si obiect (m)
M_min := F_min*d_contact
# In concluzie
M_min := F_min*d_contact = 0.56972 N*m
# Recalcularea fortei si momentului minim necesar
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# α_1, α_2 - deschiderea gripper-ului 30 - 90°
# ω_1, ω_2 - vitezele unghiulare corespunzatoare inchiderii griper-ului
# V, F_deget - viteza de inchidere a degetelor gripper-ului, respectiv forta exercitata pe deget
# Momentul creste cu cat unghiurile α_1 , α_2 scad. Asadar momentul minim necesar se determina cand α_1=α_2=30°
# Din schema cinematica rezulta:
V := ω_2max*CO_2*sin(α_2)  # error: This variable is undefined. Check that the label is set correctly.
M_min := F_min*CO_2/sin(α_2)  # error: This variable is undefined. Check that the label is set correctly.
CO_2 := 70 mm
# Din analiza dimensionala a vitezei unghiulare avem:
ω_2 := α_2max/t  # error: This variable is undefined. Check that the label is set correctly.
# Cursa gripper-ului este de la 30 - 90° adica 60°iar timpul optim de inchidere a gripper-ului este de 0.5 secunde. Asadar:
α_2cursa := 90° - 30° = 0.333333*π*rad
α_2min := 30° = 0.166667*π*rad
t := 0.5 s
ω_2 := α_2cursa/t = 2.0944 rad/s
# Deoarece 1 rad/s = 9.55 rpm rezulta:
ω_2 := 2.094 rad/s = 19.9962 rpm  # rotunjim la 20 rpm
# In concluzie
V := ω_2*CO_2 = 0.14658 m/s
M_min := F_min*CO_2/sin(α_2min) = 1.30755 N*m
# Observatie: 1) Forta aplicata de catre degetele gripperului este perpendiculara pe suprafata obiectului manipulat
# Am determinat deci, faptul ca avem nevoie de un servomotor ce poate dezvolta un cuplu mai mare de 1.31*N*m (aprox 14*kgf*cm)
# Calcularea puterii necesare a servo-motorului
P_motor := M_min*ω_2/(9.55*10^6)
# extras din formula
M_min := 9.55*10^6*P_motor/ω_2
# Mathcad face conversia automat. Din acest motiv trebuie eliminat numitorul fractiei de mai sus pentru efectuarea corecta a calculului
P_motor := M_min*ω_2 = 0.00273802 kW
# Asadar pentru un motor ce dezvolta un cuplu de minim1.31*N*m (aprox 14*kgf*cm) , la o turatie de 30 rpm, este nevoie de o putere minima de 0.003*kW
# Motorul selectat este Feetech FT5715M
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# Din informatiile prezentate in imaginea de mai sus:
# - momentul ce aduce motorul intr-un punct de stop este 1.68 Nm, mai mare decat 1.31 Nm necesar. Daca alimentam la 6V avem un cuplu limita mult mai mare de 2.14 Nm
#
# - motorul executa o rotatie cu 60°in 0.14 secunde ceea ce este mult mai rapid decat ce mi-am propus anterior (60° in 0.5 secunde)
#
# - servomotorul are o cursa de 180° in ambele directii lucru ce denota faptul ca NU executa o miscare continua de 360° si deci prezinta un element pe post de limitator de cursa. Totodata acesta prezinta si un potentiometru intern pe baza caruia se cunoaste daca motorul este la unghiul potrivit
#
# Ex: Pozitia servomotorului poate fi controlata extern utilizand un alt potentiometru
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# Calcularea Rotilor dintate
# Avem un angrenaj cu doua roti dintate cilindrice cu dinti drepti, cu raportul de angrenare de 1:1
z := 15
# z - numarul de dinti pentru cele doua roti dintate
# m_d - modulul unui dinte
# α - unghi de angrenare al dintilor rotilor dintate
m_d := 2 mm
α := 20°
# Deoarece cele doua roti dintate sunt identice, se va efectua un singur set de calcule pentru ambele roti
d_w := m_d*z = 30 mm
d_f := d_w*cos(α) = 28.1908 mm
# d_b - diametrul cercului de baza
# d - diametrul cercului de divizare
# d_w - diametrul cercului de rostogolire
# d_f - diametrul cercului de picior (fund)
# d_a - diametrul cercului de cap
# a - distanta axiala dintre rotile dintate
# r_d - raza dintelui
# ζ - jumatatea unghiului corespunzator grosimii dintelui
d_f := 28.2 mm  # - prin rotunjire
d_a := m_d*(z + 2) = 34 mm
d_b := m_d*(z - 2.5) = 25 mm
r_d := 0.39*m_d = 0.78 mm
ζ := 360°/(4*z) = 6°
a := 30 mm
# Observatie: Distanta axiala reprezinta suma diametrelor cercurilor de rostogolire a celor 2 roti dintate aflate in angrenare. Dar deoarece raportul nostru este de 1:1 si deci rotile dintate sunt identice, distanta axiala este egala cu diametrul cercului de rostogolire
# Calcularea gradului de acoperire al dintiilor
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# N_1N_2 - segmentul real de angrenare al rotiilor dintate cunoscut ca tangenta la diametrele cercurilor de baza
# AE - lungimea de contact a dintiilor reprezentand portiunea din segmentul real de angrenare rezultat din intersectia acestuia cu diametrele cercurilor de picior (fund).
# l_f - arcul (grosimea) dintelui pe cercul de picior (fund)
AE := 8.758 mm
l_f := d_f*π/z = 5.90619 mm  # ε - gradul de acoperire al dintiilor
ε := AE/l_f = 1.48285
# Cum ε = 1.48285> 1, se deduce faptul ca angrenarea se executa in mod uniform si nu exista alunecari / scapari intre dintii rotilor dintate
# Calcularea fortelor din angrenaj
T := 1.308 N*m
μ := 0.42
β := 0°
# T - momentul minim necesar actionarii gripper-ului
# μ - coeficient de frecare pentru PLA
# β - unghiul profilului rotilor dintate
# F_t1,F_t2 - fortele tangentiale in angrenaj
# F_r1,F_r2 - fortele radiale in angrenaj
# F_a1,F_a2 - fortele axiale in angrenaj
# F_n1,F_n2 - fortele normale in angrenaj
# P_1 - puterea transmisa pe arborele principal
# P_2 - puterea transmisa pe arborele secundar
F_t1 := 2*T/d_w = 87.2 N
F_t2 := F_t1 = 87.2 N
F_r1 := F_t1*tan(α) = 31.7382 N
F_r2 := F_r1 = 31.7382 N
F_a1 := F_t1*tan(β) = 0 N  # - ceea ce este logic deoarece avem roti dintate cilindrice cu dinti drepti
F_a2 := F_a1 = 0 N
F_n1 := F_t1/cos(α) = 92.7963 N
P_m := 0.003 kW  # - putere servomotor
η_rul := 0.99  # - randament rulmenti cu bile
η_c := 0.98  # - randament angrenaj cu roti cilindrice
F_n2 := F_n1 = 92.7963 N
P_1 := P_m*η_rul = 0.00297 kW
K_Va := 1.05
K_Vb := 1.07
P_2 := P_1*η_c = 0.0029106 kW
ε_β := 1  # - pentru dantura dreapta
K_V > 1  # unde
K_V := K_Vb - ε_β*(K_Vb - K_Va)  # K_V - factor dinamic al angrenajului
K_V := K_Vb - ε_β*(K_Vb - K_Va) = 1.05  # - ceea ce verifica conditia K_V > 1
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# Poza de mai sus exemplifica fortele calculate anterior
# Calcule pentru Rulmenti
# Arbore 2 - Calcul reactiuni
# In plan orizontal
l_1 := 13 mm
# In punctul 1
-F_r2*l1 + H_2*2*l_1  # = 0
# echivalent
H_2 := F_r2*l_1/(2*l_1) = 15.8691 N
# In punctul 3
H_1*2*l_1 - F_r2*l_1  # = 0
# echivalent
H_1 := F_r2*l_1/(2*l_1) = 15.8691 N
# In plan vertical
# In punctul 1
-F_t2*l_1 + V_2*2*l_1  # = 0
# echivalent
V_2 := F_t2*l_1/(2*l_1) = 43.6 N
# In punctul 3
V_1*2*l_1 - F_t2*l_1  # = 0
# echivalent
V_1 := F_t2*l_1/(2*l_1) = 43.6 N
# Arbore 1 - Calcul Reactiuni
# In plan orizontal
l_2 := 10.5 mm
l_3 := 13 mm
# In punctul 4
-F_r1*l_2 + H_3*(l_2 + l_3)  # = 0
# echivalent
H_3 := F_r1*l_2/(l_2 + l_3) = 14.1809 N
# In plan vertical
# In punctul 4
-F_t1*l_2 + V_3*(l_2 + l_3)  # = 0
# echivalent
V_3 := F_t1*l_2/(l_2 + l_3) = 38.9617 N
# Reactiunile in rulmenti (fortele radiale din rulmentii de pe arborele secundar)
F_R1 := sqrt(H_1^2 + V_1^2) = 46.3982 N
F_R2 := sqrt(H_2^2 + V_2^2) = 46.3982 N
# Reactiunile in rulmenti (fortele radiale din rulmentii de pe arborele principal cu pinion)
F_R3 := sqrt(H_3^2 + V_3^2) = 41.4622 N
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# Mai sus sunt atasate poze cu fortele ce actioneaza asupra rulmentiilor respectiv schemele de incarcare
