# Gripper cu 2 degete – actionare prin servomotor / stepper motor
# Luam in considerare urmatoarele aspecte:
# Deschiderea maxima dintre degetele gripperului este:
d_degete := 122 mm = 0.122 m
# Greutatea maxima a corpului manipulat este:
m_max := 0.2 kg
# Distanta maxima din centrul obiectului manipulat la punctul de contact intre gripper si obiect este:
d_contact := 61 mm = 0.061 m
# Degetele gripperului sunt paralele una fata de cealalta
# Materialul utilizat in realizarea componentelor gripper-ului este PLA
# PLA are coeficient de frecare μ = 0.35 - 0.42
# Calcularea fortei minime necesare manipularii
μ := 0.42
c_sig := 2
# F_min - forta minima necesara (N)
# m_max - greutatea maxima a obiectului (N)
# μ- coeficient de frecare pentru PLA
# c_sig- coeficient de siguranta
F_min := m_max*g/μ*c_sig = 9.33967 N
F_deget := F_min/2 = 4.66983 N  # F_deget - forta exercitata pe deget (N)
# Calcularea momentului minim necesar
# M_min- moment minim necesar (Nm)
# d_contact - distanta maxima din centrul obiectului
# manipulat la punctul de contact intre
# gripper si obiect (m)
M_min := F_min*d_contact
# In concluzie
M_min := F_min*d_contact = 0.56972 N*m
# Recalcularea fortei si momentului minim necesar
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# α_1, α_2 - deschiderea gripper-ului 30 - 90°
# ω_1, ω_2 - vitezele unghiulare corespunzatoare inchiderii griper-ului
# V, F_deget - viteza de inchidere a degetelor gripper-ului, respectiv forta exercitata pe deget
# Momentul creste cu cat unghiurile α_1 , α_2 scad. Asadar momentul minim necesar se determina cand α_1=α_2=30°
# Din schema cinematica rezulta:
V := ω_2max*CO_2*sin(α_2)  # error: This variable is undefined. Check that the label is set correctly.
M_min := F_min*CO_2/sin(α_2)  # error: This variable is undefined. Check that the label is set correctly.
CO_2 := 70 mm
# Din analiza dimensionala a vitezei unghiulare avem:
ω_2 := α_2max/t  # error: This variable is undefined. Check that the label is set correctly.
# Cursa gripper-ului este de la 30 - 90° adica 60°iar timpul optim de inchidere a gripper-ului este de 0.5 secunde. Asadar:
α_2cursa := 90° - 30° = 0.333333*π*rad
α_2min := 30° = 0.166667*π*rad
t := 0.5 s
ω_2 := α_2cursa/t = 2.0944 rad/s
# Deoarece 1 rad/s = 9.55 rpm rezulta:
ω_2 := 2.094 rad/s = 19.9962 rpm  # rotunjim la 20 rpm
# In concluzie
V := ω_2*CO_2 = 0.14658 m/s
M_min := F_min*CO_2/sin(α_2min) = 1.30755 N*m
# Observatie: 1) Forta aplicata de catre degetele gripperului este perpendiculara pe suprafata obiectului manipulat
# Am determinat deci, faptul ca avem nevoie de un servomotor ce poate dezvolta un cuplu mai mare de 1.31*N*m (aprox 14*kgf*cm)
# Calcularea puterii necesare a servo-motorului
P_motor := M_min*ω_2/(9.55*10^6)
# extras din formula
M_min := 9.55*10^6*P_motor/ω_2
# Mathcad face conversia automat. Din acest motiv trebuie eliminat numitorul fractiei de mai sus pentru efectuarea corecta a calculului
P_motor := M_min*ω_2 = 0.00273802 kW
# Asadar pentru un motor ce dezvolta un cuplu de minim1.31*N*m (aprox 14*kgf*cm) , la o turatie de 30 rpm, este nevoie de o putere minima de 0.003*kW
# Motorul selectat este Feetech FT5715M
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# Din informatiile prezentate in imaginea de mai sus:
# - momentul ce aduce motorul intr-un punct de stop este 1.68 Nm, mai mare decat 1.31 Nm necesar. Daca alimentam la 6V avem un cuplu limita mult mai mare de 2.14 Nm
#
# - motorul executa o rotatie cu 60°in 0.14 secunde ceea ce este mult mai rapid decat ce mi-am propus anterior (60° in 0.5 secunde)
#
# - servomotorul are o cursa de 180° in ambele directii lucru ce denota faptul ca NU executa o miscare continua de 360° si deci prezinta un element pe post de limitator de cursa. Totodata acesta prezinta si un potentiometru intern pe baza caruia se cunoaste daca motorul este la unghiul potrivit
#
# Ex: Pozitia servomotorului poate fi controlata extern utilizand un alt potentiometru
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