# Calcule Roti dintate
# Avem un angrenaj cu doua roti dintate cilindrice cu dinti drepti, cu raportul de angrenare de 1:1
z := 15
# z - numarul de dinti pentru cele doua roti dintate
# m_d - modulul unui dinte
# α - unghi de angrenare al dintilor rotilor dintate
m_d := 2 mm
α := 20°
# Deoarece cele doua roti dintate sunt identice, se va efectua un singur set de calcule pentru ambele roti
d_w := m_d*z = 30 mm
d_f := d_w*cos(α) = 28.1908 mm
# d_b - diametrul cercului de baza
# d - diametrul cercului de divizare
# d_w - diametrul cercului de rostogolire
# d_f - diametrul cercului de picior (fund)
# d_a - diametrul cercului de cap
# r_d - raza dintelui
# ζ - jumatatea unghiului corespunzator grosimii dintelui
d_f := 28.2 mm  # - prin rotunjire
d_a := m_d*(z + 2) = 34 mm
d_b := m_d*(z - 2.5) = 25 mm
r_d := 0.39*m_d = 0.78 mm
ζ := 360°/(4*z) = 6°
# Observatie: Distanta axiala reprezinta suma diametrelor cercurilor de rostogolire a celor 2 roti dintate aflate in angrenare. Dar deoarece raportul nostru este de 1:1 si deci rotile dintate sunt identice, distanta axiala este egala cu diametrul cercului de rostogolire
# Calcularea gradului de acoperire al dintiilor
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# N_1N_2 - segmentul real de angrenare al rotiilor dintate cunoscut ca tangenta la diametrele cercurilor de baza
# AE - lungimea de contact a dintiilor reprezentand portiunea din segmentul real de angrenare rezultat din intersectia acestuia cu diametrele cercurilor de picior (fund).
# l_b - arcul (grosimea) dintelui pe cercul de cap
AE := 6.46 mm
l_b := d_b*π/z = 5.23599 mm  # ε - gradul de acoperire al dintiilor
ε := AE/l_b = 1.23377
# Cum ε = 1.23377> 1, se deduce faptul ca angrenarea se executa in mod uniform si nu exista alunecari / scapari intre dintii rotilor dintate
# Calcularea fortelor din angrenaj
T := 1.308 N*m
μ := 0.42
β := 0°
# T - momentul minim necesar actionarii gripper-ului
# μ - coeficient de frecare pentru PLA
# β - unghiul profilului rotilor dintate
# F_t1,F_t2 - fortele tangentiale in angrenaj
# F_r1,F_r2 - fortele radiale in angrenaj
# F_a1,F_a2 - fortele axiale in angrenaj
# F_n1,F_n2 - fortele normale in angrenaj
# P_1 - puterea transmisa pe arborele principal
# P_2 - puterea transmisa pe arborele secundar
F_t1 := 2*T/d_w = 87.2 N
F_t2 := F_t1 = 87.2 N
F_r1 := F_t1*tan(α) = 31.7382 N
F_r2 := F_r1 = 31.7382 N
F_a1 := F_t1*tan(β) = 0 N  # - ceea ce este logic deoarece avem roti dintate cilindrice cu dinti drepti
F_a2 := F_a1 = 0 N
F_n1 := F_t1/cos(α) = 92.7963 N
P_m := 0.003 kW  # - putere servomotor
η_rul := 0.99  # - randament rulmenti cu bile
η_c := 0.98  # - randament angrenaj cu roti cilindrice
F_n2 := F_n1 = 92.7963 N
P_1 := P_m*η_rul = 0.00297 kW
K_Va := 1.05
K_Vb := 1.07
P_2 := P_1*η_c = 0.0029106 kW
ε_β := 1  # - pentru dantura dreapta
K_V > 1  # unde
K_V := K_Vb - ε_β*(K_Vb - K_Va)  # K_V - factor dinamic al angrenajului
K_V := K_Vb - ε_β*(K_Vb - K_Va) = 1.05  # - ceea ce verifica conditia K_V > 1
# Rata de eficienta a dintiilor rotilor dintate
F_totala := F_n1 = 92.7963 N
R_eff := F_t1/F_totala = 0.939693
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# Poza de mai sus exemplifica fortele calculate anterior
# Calcule pentru Rulmenti
# Arbore 2 - Calcul reactiuni
# In plan orizontal
l_1 := 13 mm
# In punctul 1
-F_r2*l1 + H_2*2*l_1  # = 0
# echivalent
H_2 := F_r2*l_1/(2*l_1) = 15.8691 N
# In punctul 3
H_1*2*l_1 - F_r2*l_1  # = 0
# echivalent
H_1 := F_r2*l_1/(2*l_1) = 15.8691 N
# In plan vertical
# In punctul 1
-F_t2*l_1 + V_2*2*l_1  # = 0
# echivalent
V_2 := F_t2*l_1/(2*l_1) = 43.6 N
# In punctul 3
V_1*2*l_1 - F_t2*l_1  # = 0
# echivalent
V_1 := F_t2*l_1/(2*l_1) = 43.6 N
# Arbore 1 - Calcul Reactiuni
# In plan orizontal
l_2 := 10.5 mm
l_3 := 13 mm
# In punctul 4
-F_r1*l_2 + H_3*(l_2 + l_3)  # = 0
# echivalent
H_3 := F_r1*l_2/(l_2 + l_3) = 14.1809 N
# In plan vertical
# In punctul 4
-F_t1*l_2 + V_3*(l_2 + l_3)  # = 0
# echivalent
V_3 := F_t1*l_2/(l_2 + l_3) = 38.9617 N
# Reactiunile in rulmenti (fortele radiale din rulmentii de pe arborele secundar)
F_R1 := sqrt(H_1^2 + V_1^2) = 46.3982 N
F_R2 := sqrt(H_2^2 + V_2^2) = 46.3982 N
# Reactiunile in rulmenti (fortele radiale din rulmentii de pe arborele principal cu pinion)
F_R3 := sqrt(H_3^2 + V_3^2) = 41.4622 N
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# Mai sus sunt atasate poze cu fortele ce actioneaza asupra rulmentiilor respectiv schemele de incarcare
